// COMSOL Multiphysics 5.5.0.292 model "SHNO_512cells_1.2mA_0.7T_30-60.mph"
// Constriction
// Outline of the model tree
// Components: comp1 "Component 1", comp2 "Component 2"

Parameters
  current = 1.2[mA]
  export_res = 512
  height = 1[um]
  width = 1[um]
  constriction_size = 50[nm]
  constriction_radius = 50[nm]
  opening_angle = 22

Geometry
  geom1 "Geometry 1" [comp1] (2D, length unit µm)
    sq1: Square | base = center; size = height
    ca1: CircularArc
      center = {-constriction_radius - constriction_size/2, 0}
      r = 50[nm]
      point1 = {-0.075, -0.05}
      point2 = {-0.075, 0.05}
      angle1 = -90
    pt1: Point
      p = {constriction_radius*sin(opening_angle*pi/180)-constriction_radius-constriction_size/2, constriction_radius*cos(opening_angle*pi/180)}
    ls2: LineSegment
      vertex1 = pt1(1) points 1
      coord1 = {-60[nm], 50[nm]}
      specify2 = coord
      vertex2 = sq1(1) points 4
      coord2 = {-1[um], constriction_radius*cos(opening_angle*pi/180)}
    rot1: Rotate
      input = ls2
      rot = -22
      pos = {constriction_radius*sin(opening_angle*pi/180)-constriction_radius-constriction_size/2, constriction_radius*cos(opening_angle*pi/180)}
    pt2: Point
      p = {constriction_radius*sin(opening_angle*pi/180)-constriction_radius-constriction_size/2, -constriction_radius*cos(opening_angle*pi/180)}
    ls3: LineSegment
      vertex1 = pt2(1) points 1
      coord1 = {-81.26967[nm], -46.3591927[nm]}
      specify2 = coord
      vertex2 = sq1(1) points 4
      coord2 = {-1[um], -constriction_radius*cos(opening_angle*pi/180)}
    rot2: Rotate
      input = ls3
      rot = 22
      pos = {constriction_radius*sin(opening_angle*pi/180)-constriction_radius-constriction_size/2, -constriction_radius*cos(opening_angle*pi/180)}
    ls4: LineSegment | vertex1 = rot1(1) points 2; vertex2 = rot2(1) points 2
    uni1: Union | input = ca1, ls4, rot1, rot2
    csol1: ConvertToSolid | input = uni1
    mir1: Mirror | input = csol1; keep = on; axis = {1, 0}
    dif1: Difference | input = sq1; input2 = csol1, mir1
    fin: Finalize "Form Union"
  geom2 "Geometry 2" [comp2] (3D, length unit cm)
    wp1: WorkPlane | unite = on
      imp1: Import | type = sequence; sequence = geom1
    ext1: Extrude | workplane = wp1; input = wp1; distance = 10[nm]; reverse = on
    wp2: WorkPlane | unite = on
      imp1: Import | type = sequence; sequence = geom1
    ext2: Extrude | workplane = wp2; input = wp2; distance = 4.96[nm]
    blk1: Block | base = center; size = {1[um], 1[um], 1[um]}
    fin: Finalize "Form Union"

Materials
  mat1: Common "Pt" [comp2] on domains 2
    def "Basic"
      relpermeability = 1.00265
      relpermittivity = 1
      electricconductivity = 8.9E6
  mat2: Common "Air" [comp2] on domains 1
    def "Basic"
      thermalexpansioncoefficient = alpha_p(pA,T)
      molarmass = 0.02897
      bulkviscosity = muB(T)
      relpermeability = 1
      relpermittivity = 1
      dynamicviscosity = eta(T)
      ratioofspecificheat = 1.4
      electricconductivity = 0[S/m]
      heatcapacity = Cp(T)
      density = rho(pA,T)
      thermalconductivity = k(T)
      soundspeed = cs(T)
      eta: Piecewise | arg = T; pieces = {200.0, 1600.0, -8.38278E-7+8.35717342E-8*T^1-7.69429583E-11*T^2+4.6437266E-14*T^3-1.06585607E-17*T^4}; argunit = K; fununit = Pa*s
      Cp: Piecewise | arg = T; pieces = {200.0, 1600.0, 1047.63657-0.372589265*T^1+9.45304214E-4*T^2-6.02409443E-7*T^3+1.2858961E-10*T^4}; argunit = K; fununit = J/(kg*K)
      rho: Analytic | expr = pA*0.02897/R_const[K*mol/J]/T; args = {pA, T}; dermethod = manual; argders = {{pA, d(pA*0.02897/R_const/T,pA)}, {T, d(pA*0.02897/R_const/T,T)}}; argunit = Pa,K; fununit = kg/m^3
      k: Piecewise | arg = T; pieces = {200.0, 1600.0, -0.00227583562+1.15480022E-4*T^1-7.90252856E-8*T^2+4.11702505E-11*T^3-7.43864331E-15*T^4}; argunit = K; fununit = W/(m*K)
      cs: Analytic | expr = sqrt(1.4*R_const[K*mol/J]/0.02897*T); args = T; dermethod = manual; argunit = K; fununit = m/s
      an1: Analytic | funcname = alpha_p; expr = -1/rho(pA,T)*d(rho(pA,T),T); args = {pA, T}; argunit = Pa,K; fununit = 1/K
      an2: Analytic "Analytic 2a" | funcname = muB; expr = 0.6*eta(T); args = T; argunit = K; fununit = Pa*s
    RefractiveIndex
      n = 1
      ki = 0
    NonlinearModel
      BA = (def.gamma+1)/2
  mat3: Common "Ni80Fe20" [comp2] on domains 3
    def "Basic"
      electricconductivity = 1.74e6
      relpermeability = 1
      relpermittivity = 1
  mat4: Common "Pt 1"
    def "Basic"
      relpermeability = 1.00265
      relpermittivity = 1
      electricconductivity = 8.9E6
  mat5: Common "Air 1"
    // same settings as mat2
  mat6: Common "Ni80Fe20.1"
    def "Basic"
      electricconductivity = 1.74e6
      relpermeability = 8000
      relpermittivity = 15

Physics
  mf: InductionCurrents "Magnetic Fields" [geom2] on all domains
    dependent variable A = {Ax, Ay, Az}
    al1: AmperesLaw "Ampère's Law 1" (default)
      ConstitutiveRelationBH = RelativePermeability
      e_crel_BH_RemanentFluxDensity = {1, 0, 0}
      eHc = {1, 0, 0}
      inStationaryStudy = TransientInitialization
      ConstitutiveRelationJcE = ElectricalConductivity
      ConstitutiveRelationDE = RelativePermittivity
      T = 273.15[K]
      materialType = nonSolid
    mi1: MagneticInsulation (default) | constraintType = symmetricConstraint; constraintMethod = elemental
    init1: init "Initial Values 1" (default)
    coil1: Coil on domains 2, 3
      ConductorModel = Single
      CoilType = Linear
      CoilName = 1
      VCoil = 1[V]
      PCoil = 1[W]
      N = 10
      sigmaCoil = 6e7[S/m]
      AreaFrom = UserDefined
      coilWindDiameter = 1[mm]
      coilWindArea = 1e-6[m^2]
      ConstitutiveRelationJcE = ElectricalConductivity
      DivergenceFilter = 1
      StabilizationConductivity = Automatic
      sigmaDomain = 1[S/m]
      ConstitutiveRelationBH = RelativePermeability
      e_crel_BH_RemanentFluxDensity = {1, 0, 0}
      eHc = {1, 0, 0}
      inStationaryStudy = TransientInitialization
      ConstitutiveRelationDE = RelativePermittivity
      T = 273.15[K]
      materialType = nonSolid
      ccc1: CoilCurrentCalculation "Geometry Analysis 1" (default) | fl = 1; fA = 1
        ct1: CoilTerminal "Input 1" on boundaries 5 | constraintType = symmetricConstraint; constraintMethod = elemental
        cg1: CoilGround "Output 1" on boundaries 20, 21
          constraintType = symmetricConstraint
          constraintMethod = elemental

Mesh
  mesh2 "Mesh 2" [geom2] (physics-controlled)

Studies
  std1 "Study 1"
    ccc: CoilCurrentCalculation "Coil Geometry Analysis"
    stat: Stationary

Solver configurations
  sol1 "Solution 1" (study std1)
    v1: Variables "Dependent Variables 1"
    s1: Stationary "Stationary Solver 1"
      dDef: Direct
      fc1: FullyCoupled
    su1: StoreSolution "Solution Store 1"
    v2: Variables "Dependent Variables 2"
    s2: Stationary "Stationary Solver 2"
      fc1: FullyCoupled
      i1: Iterative
        mg1: Multigrid
  sol2 "Solution Store 1" (study std1)

Datasets
  dset1: Solution | solution = sol1
  cpl1: CutPlane "Cut Magnetic Layer" | data = dset1
  cpl2: CutPlane "Cut Conductor Layer" | data = dset1
  dset2: Solution | solution = sol2

Plots
  pg3: PlotGroup3D "Current Density" | data = cpl2
    surf1: Surface | expr = mf.normJ
  pg4: PlotGroup3D "Oersted Field" | data = cpl1
    surf1: Surface (disabled) | data = cpl1; expr = mf.normB
    surf2: Surface | expr = mf.Bx
  pg5: PlotGroup3D "Magnetic Flux Density Norm (mf)" | data = dset1
    mslc1: Multislice | expr = dom
  pg6: PlotGroup3D "3D Plot Group 6" | data = dset1
    con1: Contour | expr = mf.normH

Exports
  data1: Data
    data = cpl2
    expr = mf.normJ
    filename = C:\Users\coren\Documents\ECOLE\MINES_NANCY\STAGE\PFE\Work\Comsol\1.1mA_1024\J_1.1mA.txt
  data2: Data
    data = cpl1
    expr = {mf.Bx, mf.By, mf.Bz}
    filename = C:\Users\coren\Documents\ECOLE\MINES_NANCY\STAGE\PFE\Work\Comsol\1.1mA_1024\B_1.1mA.txt
  data3: Data
    data = cpl1
    expr = dom
    filename = C:\Users\coren\Documents\ECOLE\MINES_NANCY\STAGE\PFE\Work\Comsol\1.2mA_1024\geom_1024.txt
  data4: Data
    data = cpl2
    expr = mf.normJ
    filename = C:\Users\coren\Documents\ECOLE\THESE\_ma_these\Work\SHNO_simulations\2023-10-12\SHNO_512cells_1.2mA_0.7T_30-60\ComsolResults_512_1.2mA\J_512_1.2mA.txt
  data5: Data
    data = cpl1
    expr = {mf.Bx, mf.By, mf.Bz}
    filename = C:\Users\coren\Documents\ECOLE\THESE\_ma_these\Work\SHNO_simulations\2023-10-12\SHNO_512cells_1.2mA_0.7T_30-60\ComsolResults_512_1.2mA\Oersted_512_1.2mA.txt
  data6: Data
    data = cpl1
    expr = dom
    filename = C:\Users\coren\Documents\ECOLE\THESE\_ma_these\Work\SHNO_simulations\2023-10-12\SHNO_512cells_1.2mA_0.7T_30-60\ComsolResults_512_1.2mA\geom_512.txt

Methods
  compute_multiple: CodeEditor
    public class compute_multiple extends ApplicationMethod {
      public void execute() {
        //String[] currents = {"1.10[mA]", "1.11[mA]", "1.12[mA]", "1.13[mA]", "1.14[mA]", "1.15[mA]",
        // "1.16[mA]", "1.17[mA]", "1.18[mA]", "1.19[mA]", "1.20[mA]"};
        String[] currents = {"1.1[mA]"};
        int cellsNumber = 256;
        String Oersted_prefix = "Oersted_"+toString(cellsNumber)+"_";
        String J_prefix = "J_"+toString(cellsNumber)+"_";
        for (String current : currents) {
          model.param().set("current", current);
          model.param().set("export_res", cellsNumber);
          current = current.replace("[", "");
          current = current.replace("]", "");
          String dirName = "C:\\Users\\coren\\Documents\\ECOLE\\MINES_NANCY\\STAGE\\PFE\\Work\\Comsol\\grid"+toString(cellsNumber)+"_"+current;
          createDirectory(dirName);
          model.study("std1").run();
          model.result().export("data4").set("filename", dirName+"\\"+J_prefix+current+".txt");
          model.result().export("data4").run();
          model.result().export("data5").set("filename", dirName+"\\"+Oersted_prefix+current+".txt");
          model.result().export("data5").run();
          model.result().export("data6").set("filename", dirName+"\\"+"geom_"+toString(cellsNumber)+".txt");
          model.result().export("data6").run();
          saveModel(model, dirName+"\\model.mph");
        }
        alert("Computations finished", "Finished");
      }
    }
  CLI_compute: CodeEditor
    public class CLI_compute extends ApplicationMethod {
      public void execute() {
        //Read the parameters CSV file
        String file = "parameters.csv";
        String[][] parameterFile = readCSVFile(file);
        String[] cellNumberArray = getColumn(parameterFile, 0);
        debugLog(cellNumberArray);
        String[] currentArray = getColumn(parameterFile, 1);
        debugLog(currentArray);
        // Iterate i from 0 to N minus 1
        for (int i = 0; i < currentArray.length; ++i) {
          //Get current value
          String current = currentArray[i];
          debugLog(current);
          //Set the model parameter
          model.param().set("current", current);
          //Format the string for filename use
          current = current.replace("[", "");
          current = current.replace("]", "");
          debugLog(current);
          //Get the cell number value
          String cellNumber = cellNumberArray[i];
          debugLog(cellNumber);
          //Set the model parameter
          model.param().set("export_res", cellNumber);
          //Prepare filename prefixes
          String Oersted_prefix = "Oersted_"+cellNumber+"_";
          String J_prefix = "J_"+cellNumber+"_";
          //Create model directory
          String modelPath = substring(model.getFilePath(), 0, model.getFilePath().length()-4);
          String dirName = modelPath+"_"+cellNumber+"_"+current;
          createDirectory(dirName);
          //Run simulation
          model.study("std1").run();
          //Exports results
          model.result().export("data4").set("filename", dirName+"\\"+J_prefix+current+".txt");
          model.result().export("data4").run();
          model.result().export("data5").set("filename", dirName+"\\"+Oersted_prefix+current+".txt");
          model.result().export("data5").run();
          model.result().export("data6").set("filename", dirName+"\\"+"geom_"+cellNumber+".txt");
          model.result().export("data6").run();
          //Save model for history. Not memory efficient
          copyFile(model.getFilePath(), dirName+"\\model.mph");
        }
      }
    }
  method1: CodeEditor
    public class method1 extends ApplicationMethod {
      public void execute() {
        //Read the parameters CSV file
        String[] splitResult = split(model.getFilePath(), "\\");
        splitResult = remove(splitResult, splitResult.length-1);
        String modelPath = concat("\\", splitResult);
        String file = modelPath+"\\parameters.csv";
        String[][] parameterFile = readCSVFile(file);
        String cellNumber = parameterFile[0][0];
        String current = parameterFile[0][1];
        //Set the model parameter
        model.param().set("current", current);
        //Format the string for filename use
        current = current.replace("[", "");
        current = current.replace("]", "");
        debugLog(cellNumber);
        //Set the model parameter
        model.param().set("export_res", cellNumber);
        //Prepare filename prefixes
        String Oersted_prefix = "Oersted_"+cellNumber+"_";
        String J_prefix = "J_"+cellNumber+"_";
        //Create model director
        String dirName = modelPath+"\\ComsolResults_"+cellNumber+"_"+current;
        createDirectory(dirName);
        //Run simulation
        model.study("std1").run();
        //Exports results
        model.result().export("data4").set("filename", dirName+"\\"+J_prefix+current+".txt");
        model.result().export("data4").run();
        model.result().export("data5").set("filename", dirName+"\\"+Oersted_prefix+current+".txt");
        model.result().export("data5").run();
        model.result().export("data6").set("filename", dirName+"\\"+"geom_"+cellNumber+".txt");
        model.result().export("data6").run();
        //Save model for history. Not memory efficient
        model.sol("sol1").clearSolutionData();
        saveModel(model, model.getFilePath());
      }
    }
  rename_J_file: CodeEditor
    public class rename_J_file extends ApplicationMethod {
      public void execute() {
        model.result().export("data1").set("filename", "C:\\Users\\coren\\Documents\\ECOLE\\MINES_NANCY\\STAGE\\PFE\\Work\\Comsol\\"+J_name);
      }
    }
  rename_H_file: CodeEditor "rename_J_file 1"
    public class rename_H_file extends ApplicationMethod {
      public void execute() {
        model.result().export("data2").set("filename", "C:\\Users\\coren\\Documents\\ECOLE\\MINES_NANCY\\STAGE\\PFE\\Work\\Comsol\\"+H_name);
      }
    }
  rename_geom_file: CodeEditor "rename_J_file 1.1"
    public class rename_geom_file extends ApplicationMethod {
      public void execute() {
        model.result().export("data3").set("filename", "C:\\Users\\coren\\Documents\\ECOLE\\MINES_NANCY\\STAGE\\PFE\\Work\\Comsol\\"+geom_name);
      }
    }